<?xml version="1.0"?>

<!-- Generated by Aero-Matic v 3.3.0

    See: http://wiki.flightgear.org/JSBSim_Thrusters#FGPropeller

    Inputs:
           horsepower: 2600
       max engine rpm: 2700
   prop diameter (ft): 5.97
      prop chord (ft): 0.464238
                pitch: variable at 45 inch

    Outputs:
         max prop rpm: 3142.88
           gear ratio: 1
                  Cp0: 0.551725
                  Ct0: 1.28552
  static thrust (lbs): 10654.7
-->

<propeller name="prop">
  <ixx> 80.0 </ixx>
  <diameter unit="IN">156.0 </diameter>
  <numblades> 4 </numblades>
  <gearratio>1.98 </gearratio>
  <minpitch> 20 </minpitch>
  <maxpitch> 55 </maxpitch>
  <minrpm>   1000 </minrpm>
  <maxrpm>   2800 </maxrpm>
  <p_factor> 7.0 </p_factor>
  <ct_factor>1.3  </ct_factor>

  <table name="C_THRUST" type="internal">
      <tableData>
                -10        0         15        25        35        45        55        65       90
      -0.2      -0.1069    0.0602    0.2190    0.2682    0.2956    0.3120    0.2875    0.2463   0.0000
       0.0      -0.1588    0.0000    0.2190    0.2682    0.2956    0.3149    0.2943    0.2463   0.0000
       0.2      -0.1780   -0.0547    0.1890    0.2628    0.2915    0.3149    0.2943    0.2463   0.0000
       0.4      -0.1780   -0.1272    0.1423    0.2601    0.2860    0.3120    0.2943    0.2463   0.0000
       0.6      -0.1780   -0.1780    0.0753    0.2341    0.2737    0.3039    0.2901    0.2463   0.0000
       0.8      -0.1780   -0.1780    0.0042    0.1752    0.2656    0.2930    0.2901    0.2463   0.0000
       1.0      -0.1780   -0.1780   -0.0712    0.1069    0.2547    0.2779    0.2875    0.2463   0.0000
       1.2      -0.1780   -0.1780   -0.1465    0.0328    0.2093    0.2682    0.2875    0.2463   0.0000
       1.4      -0.1780   -0.1780   -0.1780   -0.0480    0.1507    0.2641    0.2820    0.2463   0.0000
       1.6      -0.1780   -0.1780   -0.1780   -0.1217    0.0821    0.2547    0.2766    0.2463   0.0000
       1.8      -0.1780   -0.1780   -0.1780   -0.1780    0.0138    0.2190    0.2682    0.2463   0.0000
       2.0      -0.1780   -0.1780   -0.1780   -0.1780   -0.0547    0.1710    0.2531    0.2463   0.0000
       2.2      -0.1780   -0.1780   -0.1780   -0.1780   -0.1233    0.1233    0.2190    0.2463   0.0000
       2.4      -0.1780   -0.1780   -0.1780   -0.1780   -0.1780    0.0657    0.1780    0.2463   0.0000
       2.6      -0.1780   -0.1780   -0.1780   -0.1780   -0.1780    0.0083    0.1327    0.2190   0.0000
       2.8      -0.1780   -0.1780   -0.1780   -0.1780   -0.1780   -0.0493    0.0889    0.1780   0.0000
       3.0      -0.1780   -0.1780   -0.1780   -0.1780   -0.1780   -0.1069    0.0466    0.1369   0.0000
       3.2      -0.1780   -0.1780   -0.1780   -0.1780   -0.1780   -0.1642    0.0042    0.0959   0.0000
       3.4      -0.1780   -0.1780   -0.1780   -0.1780   -0.1780   -0.1780   -0.0383    0.0547   0.0000
       3.6      -0.1780   -0.1780   -0.1780   -0.1780   -0.1780   -0.1780   -0.0808    0.0138   0.0000
       3.8      -0.1780   -0.1780   -0.1780   -0.1780   -0.1780   -0.1780   -0.1233   -0.0274   0.0000
       4.0      -0.1780   -0.1780   -0.1780   -0.1780   -0.1780   -0.1780   -0.1655   -0.0685   0.0000
       6.0      -0.1780   -0.1780   -0.1780   -0.1780   -0.1780   -0.1780   -0.1780   -0.1780   0.0000
      </tableData>
  </table>

  <table name="C_POWER" type="internal">
     <tableData>
               -10       0         15        25        35        45        55        65       90
      -0.2      0.0157   0.0313    0.1097    0.2490    0.4295    0.6109    0.7048    0.7800   0.7800
       0.0      0.0627   0.0157    0.0940    0.2321    0.4107    0.6109    0.7077    0.7800   0.7800
       0.2      0.0893   0.0251    0.0909    0.2162    0.3928    0.6109    0.7077    0.7800   0.7800
       0.4      0.1203   0.0548    0.0783    0.1992    0.3731    0.6109    0.7077    0.7800   0.7800
       0.6      0.1475   0.0830    0.0517    0.1851    0.3496    0.5986    0.7048    0.7800   0.7800
       0.8      0.1739   0.1112    0.0157    0.1569    0.3289    0.5714    0.7048    0.7800   0.7800
       1.0      0.2002   0.1381    0.0157    0.1100    0.3101    0.5423    0.7020    0.7800   0.7800
       1.2      0.2274   0.1104   -0.0517    0.0423    0.2744    0.5197    0.6973    0.7800   0.7800
       1.4      0.2537   0.1908   -0.0780   -0.0313    0.2115    0.5122    0.6889    0.7800   0.7800
       1.6      0.2801   0.2180   -0.0912   -0.0940    0.1335    0.4981    0.6738    0.7518   0.7800
       1.8      0.3073   0.2443   -0.0940   -0.1569    0.0392    0.4417    0.6532    0.7359   0.7800
       2.0      0.3336   0.2707   -0.1203   -0.2190   -0.0470    0.3759    0.6221    0.7208   0.7800
       2.2      0.3599   0.2979   -0.1475   -0.2819   -0.1410    0.3054    0.6033    0.6889   0.7800
       2.4      0.3872   0.3242   -0.1739   -0.3449   -0.2349    0.2180    0.5855    0.6738   0.7800
       2.6      0.4135   0.3505   -0.2002   -0.4069   -0.2979    0.0912    0.5714    0.6500   0.7800
       2.8      0.4398   0.3778   -0.2274   -0.4699   -0.3571   -0.0310    0.5592    0.6419   0.7800
       3.0      0.4671   0.4041   -0.2537   -0.5329   -0.4229   -0.1410    0.5404    0.6419   0.7800
       3.2      0.4934   0.4304   -0.2801   -0.5949   -0.4859   -0.2509    0.5056    0.6268   0.7800
       3.4      0.5197   0.4577   -0.3073   -0.6579   -0.5479   -0.3599    0.3919    0.6109   0.7800
       3.6      0.5470   0.4840   -0.3336   -0.7208   -0.6109   -0.4699    0.2754    0.5949   0.7800
       3.8      0.5733   0.5103   -0.3599   -0.7800   -0.6738   -0.5798    0.1532    0.5761   0.7800
       4.0      0.5996   0.5376   -0.3872   -0.7800   -0.7800   -0.6889    0.0310    0.5329   0.7800
       6.0      0.7800   0.7800   -0.7800   -0.7800   -0.7800   -0.7800   -0.7800   -0.4699   0.7800
     </tableData>
  </table>

  <!-- thrust effects of helical tip Mach -->
  <table name="CT_MACH" type="internal">
     <tableData>
       0.85    1.0
       1.05    0.8
     </tableData>
  </table>

  <!-- power-required effects of helical tip Mach -->
  <table name="CP_MACH" type="internal">
     <tableData>
       0.85    1.0
       1.05    1.8
       2.00    1.4
     </tableData>
  </table>


</propeller>
